# OpenSim document version 40000
Model colombe_real_data:
  gravity: 0 0 -9.8
  defaults: Thelen2003Muscle default: max_isometric_force=546 optimal_fiber_length=0.0535 tendon_slack_length=0.078
      pennation_angle_at_optimal=0.1396263 [radians] max_contraction_velocity=10 default_activation=1
  Ground
  BodySet:
    Body thorax: mass=46.24 [kg] mass_center=(0 -0.5380905 0) inertia=(7.695889 1.476832 8.42079 0 0 0)
        meshes=(ribs.vtp hat_spine.vtp)
    Body clavicle: mass=0.2 mass_center=(0 0 0) inertia=(0.003200131 0.003200131 0.003200131 0 0 0)
        meshes=r_clavicle.vtp
    Body scapula: mass=0.5 mass_center=(0 0 0) inertia=(0.0003854387 0.0003854387 0.0003854387 0 0 0)
        meshes=r_scapula.vtp
    Body humerus: mass=2.537 mass_center=(0 -0.1431165 0) inertia=(0.03949072 0.006039237 0.03949072 0 0 0)
        meshes=r_humerus.vtp
    Body ulna: mass=0.98205 mass_center=(0 -0.1096383 0) inertia=(0.007722634 0.0008711057 0.007847341 0 0 0)
        meshes=r_ulna.vtp
    Body radius: mass=0.6075 mass_center=(0 0 0) inertia=(0.003510799 0.0007325017 0.003808298 0 0 0)
        meshes=r_radius.vtp
    Body hand_r: mass=0.20378 mass_center=(0 -0.068095 0) inertia=(0.00058 0.000355 0.000871 0 0 0)
        meshes=(pisiform.vtp scaphoid.vtp triquetrum.vtp hamate.vtp capitate.vtp trapezoid.vtp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)
  JointSet:
    CustomJoint ground_thorax: socket_parent_frame=ground_offset socket_child_frame=thorax_offset
      Coordinate thorax_tilt: default_value=-0.1177357 range=(-1.5708 1.5708) clamped=false
      Coordinate thorax_list: default_value=0.08566827 range=(-1.5708 1.5708) clamped=false
      Coordinate thorax_rotation: default_value=1.565507 range=(-1.5708 1.5708) clamped=false
      Coordinate thorax_tx: default_value=-0.7482012 range=(-20 20) clamped=false
      Coordinate thorax_ty: default_value=0.7207003 range=(-2 4) clamped=false
      Coordinate thorax_tz: default_value=-0.2895946 range=(-5 5) clamped=false
      PhysicalOffsetFrame ground_offset: socket_parent=/ground translation=(0 0 0) [meters]
          orientation=(1.5708 3.15159 0) [radians]
      PhysicalOffsetFrame thorax_offset: socket_parent=/bodyset/thorax translation=(0 0 0)
      SpatialTransform:
        TransformAxis rotation1: coordinates=thorax_tilt axis=(0 0 1) LinearFunction(coefficients=1 0)
        TransformAxis rotation2: coordinates=thorax_list axis=(1 0 0) LinearFunction(coefficients=1 0)
        TransformAxis rotation3: coordinates=thorax_rotation axis=(0 1 0) LinearFunction(coefficients=1 0)
        TransformAxis translation1: coordinates=thorax_tx axis=(1 0 0)
            MultiplierFunction(scale=1, LinearFunction(coefficients=1 0))
        TransformAxis translation2: coordinates=thorax_ty axis=(0 1 0)
            MultiplierFunction(scale=1, LinearFunction(coefficients=1 0))
        TransformAxis translation3: coordinates=thorax_tz axis=(0 0 1)
            MultiplierFunction(scale=1, LinearFunction(coefficients=1 0))
    CustomJoint SCJ: socket_parent_frame=thorax_offset socket_child_frame=clavicle_offset
      Coordinate sternoclavicular_r1: default_value=0.3455309 range=(-1.570796 1.8326) clamped=true
      Coordinate sternoclavicular_r2: default_value=0 range=(-1.570796 1.570796) clamped=true locked=true
      Coordinate sternoclavicular_r3: default_value=0 range=(-1.570796 1.570796) clamped=true locked=true
      PhysicalOffsetFrame thorax_offset: socket_parent=/bodyset/thorax translation=(0.007867641 0.008620198 0.03167825)
      PhysicalOffsetFrame clavicle_offset: socket_parent=/bodyset/clavicle translation=(0 0 0)
      SpatialTransform: axes_held_at_zero=(translation1 translation2 translation3)
        TransformAxis rotation1: coordinates=sternoclavicular_r1 axis=(1 0 0) LinearFunction(coefficients=1 0)
        TransformAxis rotation2: coordinates=sternoclavicular_r2 axis=(0 1 0) LinearFunction(coefficients=1 0)
        TransformAxis rotation3: coordinates=sternoclavicular_r3 axis=(0 0 1) LinearFunction(coefficients=1 0)
    CustomJoint ACJ: socket_parent_frame=clavicle_offset socket_child_frame=scapula_offset
      Coordinate Acromioclavicular_r1: default_value=0 range=(-1.570796 1.570796) clamped=true locked=true
      Coordinate Acromioclavicular_r2: default_value=0 range=(-1.570796 1.570796) clamped=true locked=true
      Coordinate Acromioclavicular_r3: default_value=0 range=(-1.570796 1.570796) clamped=true locked=true
      PhysicalOffsetFrame clavicle_offset: socket_parent=/bodyset/clavicle
          translation=(-0.0170995 0.02394854 0.1617292)
      PhysicalOffsetFrame scapula_offset: socket_parent=/bodyset/scapula translation=(0 0 0)
      SpatialTransform: axes_held_at_zero=(translation1 translation2 translation3)
        TransformAxis rotation1: coordinates=Acromioclavicular_r1 axis=(1 0 0) LinearFunction(coefficients=1 0)
        TransformAxis rotation2: coordinates=Acromioclavicular_r2 axis=(0 1 0) LinearFunction(coefficients=1 0)
        TransformAxis rotation3: coordinates=Acromioclavicular_r3 axis=(0 0 1) LinearFunction(coefficients=1 0)
    CustomJoint Shoulder: socket_parent_frame=scapula_offset socket_child_frame=humerus_offset
      Coordinate shoulder_r1: default_value=-1.227064 range=(-1.570796 1.570796) clamped=true
      Coordinate shoulder_r2: default_value=-0.9775969 range=(-1.570796 1.570796) clamped=true
      Coordinate shoulder_r3: default_value=-0.963828 range=(-1.570796 1.570796) clamped=true
      PhysicalOffsetFrame scapula_offset: socket_parent=/bodyset/scapula
          translation=(-0.01931255 -0.0553935 -0.002377496) orientation=(-0.2 0.3 -0.1)
      PhysicalOffsetFrame humerus_offset: socket_parent=/bodyset/humerus translation=(0 0 0)
      SpatialTransform: axes_held_at_zero=(translation1 translation2 translation3)
        TransformAxis rotation1: coordinates=shoulder_r1 axis=(1 0 0) LinearFunction(coefficients=1 0)
        TransformAxis rotation2: coordinates=shoulder_r2 axis=(0 1 0) LinearFunction(coefficients=1 0)
        TransformAxis rotation3: coordinates=shoulder_r3 axis=(0 0 1) LinearFunction(coefficients=1 0)
    CustomJoint elbow: socket_parent_frame=humerus_offset socket_child_frame=ulna_offset
      Coordinate elbow_flexion: default_value=0.3396473 range=(0 3) clamped=true
      PhysicalOffsetFrame humerus_offset: socket_parent=/bodyset/humerus
          translation=(0.006578547 -0.3131959 -0.0132658) orientation=(0.5 0 0)
      PhysicalOffsetFrame ulna_offset: socket_parent=/bodyset/ulna translation=(0 0 0)
      SpatialTransform: axes_held_at_zero=(rotation1 rotation2 translation1 translation2 translation3)
        TransformAxis rotation3: coordinates=elbow_flexion axis=(0 0 1) LinearFunction(coefficients=1 0)
    CustomJoint radioulnar: socket_parent_frame=ulna_offset socket_child_frame=radius_offset
      Coordinate pro_sup: default_value=0 range=(-1.91986 1.570796) clamped=true locked=true
      PhysicalOffsetFrame ulna_offset: socket_parent=/bodyset/ulna translation=(0.0003873331 -0.01112213 0.01933494)
      PhysicalOffsetFrame radius_offset: socket_parent=/bodyset/radius translation=(0 0 0)
      SpatialTransform: axes_held_at_zero=(rotation1 rotation3 translation1 translation2 translation3)
        TransformAxis rotation2: coordinates=pro_sup axis=(0 1 0) LinearFunction(coefficients=1 0)
    CustomJoint radius_hand_r: socket_parent_frame=radius_offset socket_child_frame=hand_r_offset
      Coordinate hand_r_Add: default_value=0 range=(-1.2 1.2) clamped=true locked=true
      Coordinate hand_r_Flex: default_value=0 range=(-1 1.39626) clamped=true locked=true
      PhysicalOffsetFrame radius_offset: socket_parent=/bodyset/radius translation=(0.02189437 -0.2899133 0.037546)
      PhysicalOffsetFrame hand_r_offset: socket_parent=/bodyset/hand_r translation=(0 0 0)
      SpatialTransform: axes_held_at_zero=(rotation2 translation1 translation2 translation3)
        TransformAxis rotation1: coordinates=hand_r_Add axis=(1 0 0) LinearFunction(coefficients=1 0)
        TransformAxis rotation3: coordinates=hand_r_Flex axis=(0 0 1) LinearFunction(coefficients=1 0)
  ForceSet:
    Thelen2003Muscle PECM2: max_isometric_force=515.41 optimal_fiber_length=0.1480411 tendon_slack_length=0.09532947
        pennation_angle_at_optimal=0.43633
      PathPoint P1: humerus (0.01387336 -0.04657484 0.008918586)
      PathPoint P2: thorax (0.02565535 -0.05008902 0.1539321)
      PathPoint P3: thorax (0.04275892 -0.05497575 0.1356069)
      PathPoint P4: thorax (0.03909387 -0.06352754 0.03176377)
    Thelen2003Muscle PECM3: max_isometric_force=390.55 optimal_fiber_length=0.1100401 tendon_slack_length=0.1376912
        pennation_angle_at_optimal=0.436
      PathPoint P1: humerus (0.01368616 -0.04718427 0.008086184)
      PathPoint P2: thorax (0.0366505 -0.09872827 0.1478237)
      PathPoint P3: thorax (0.06274847 -0.1209467 0.1185033)
      PathPoint P4: thorax (0.08063111 -0.1637056 0.05253239)
    Thelen2003Muscle DELT3: max_isometric_force=259.88 optimal_fiber_length=0.1460162 tendon_slack_length=0.04032241
        pennation_angle_at_optimal=0.31415
      PathPoint P1: scapula (-0.08959991 -0.001261134 -0.06280066)
      PathPoint P2: scapula (-0.0994631 -0.04591268 -0.03239402)
      PathPoint P3: humerus (-0.004190913 -0.07820421 0.001600252)
    Thelen2003Muscle tric_long: max_isometric_force=798.52 optimal_fiber_length=0.1625123 tendon_slack_length=0.1461626
        pennation_angle_at_optimal=0.2094
      PathPoint P1: scapula (-0.05284534 -0.06707884 -0.01601422)
      PathPoint P2: humerus (-0.02036192 -0.2635412 -0.009037808)
      PathPoint P3: humerus (-0.0187982 -0.2885727 -0.01302827)
      PathPoint P4: ulna (-0.02117376 0.01011305 -0.0007541328)
    Thelen2003Muscle tric_lat: max_isometric_force=624.3 optimal_fiber_length=0.08563172 tendon_slack_length=0.1009125
        pennation_angle_at_optimal=0.17
      PathPoint P1: humerus (-0.006460217 -0.136387 0.004615973)
      PathPoint P2: humerus (-0.02633688 -0.268827 -0.01133503)
      PathPoint P3: ulna (-0.02117376 0.01011305 -0.0007541328)
    Thelen2003Muscle tric_med: max_isometric_force=624.3 optimal_fiber_length=0.08538853 tendon_slack_length=0.09332242
        pennation_angle_at_optimal=0.157
      PathPoint P1: humerus (-0.009037808 -0.1476997 -0.009771183)
      PathPoint P2: humerus (-0.03433943 -0.2441403 -0.01312538)
      PathPoint P3: humerus (-0.0187982 -0.2885727 -0.01302827)
      PathPoint P4: ulna (-0.02117376 0.01011305 -0.0007541328)
    Thelen2003Muscle PECM1: max_isometric_force=364.41 optimal_fiber_length=0.1484456 tendon_slack_length=0.002875249
        pennation_angle_at_optimal=0.2967
      PathPoint P1: humerus (0.01260751 -0.04519989 0.008412288)
      PathPoint P2: clavicle (0.003830346 0.006774498 0.07833581)
    Thelen2003Muscle DELT1: max_isometric_force=1142.6 optimal_fiber_length=0.8213014 tendon_slack_length=0.09312768
        pennation_angle_at_optimal=0.38397
      PathPoint P1: humerus (0.009663337 -0.1281581 0.006309226)
      PathPoint P2: humerus (0.02914366 -0.01673583 0.02029176)
      PathPoint P3: clavicle (-0.02163503 0.02214778 0.1258042)
    Thelen2003Muscle DELT2: max_isometric_force=1142.6 optimal_fiber_length=0.06837995 tendon_slack_length=0.1740208
        pennation_angle_at_optimal=0.26179
      PathPoint P1: humerus (-0.00495477 -0.1575617 0.00495477)
      PathPoint P2: humerus (-0.00990954 -0.08324013 0.01387336)
      PathPoint P3: humerus (-0.01981908 0.00990954 0.02873767)
      PathPoint P4: scapula (-0.01190401 0.001190401 -0.001190401)
    Thelen2003Muscle SUPSP: max_isometric_force=487.82 optimal_fiber_length=0.1216948 tendon_slack_length=0.04463764
        pennation_angle_at_optimal=0.12217
      PathPoint P1: humerus (-0.000743159 0.01636481 0.0276165)
      PathPoint P2: scapula (-0.07892416 -0.00605758 -0.103721)
    Thelen2003Muscle INFSP: max_isometric_force=1210.84 optimal_fiber_length=0.1452083 tendon_slack_length=0.03500361
        pennation_angle_at_optimal=0.32288
      PathPoint P1: humerus (-0.01154739 -0.001575141 0.0272988)
      PathPoint P2: scapula (-0.08398075 -0.06370703 -0.03623663)
      PathPoint P3: scapula (-0.1052321 -0.07744009 -0.06555418)
    Thelen2003Muscle SUBSC: max_isometric_force=1377.81 optimal_fiber_length=0.09121437 tendon_slack_length=0.03448037
        pennation_angle_at_optimal=0.34906
      PathPoint P1: humerus (0.01816191 0.007301438 -0.01564905)
      PathPoint P2: scapula (-0.02139721 -0.06095364 -0.03059842)
      PathPoint P3: scapula (-0.09884623 -0.05504972 -0.08944219)
    Thelen2003Muscle bic_l: max_isometric_force=624.3 optimal_fiber_length=0.1658206 tendon_slack_length=0.2770008
        pennation_angle_at_optimal=0
      PathPoint P1: scapula (-0.04213328 -0.03174513 -0.01760615)
      PathPoint P2: humerus (0.01152915 0.02971276 -0.002674674)
      PathPoint P3: humerus (0.02209837 0.01838844 0.0003882587)
      PathPoint P4: humerus (0.02961575 2.157e-5 0.0001617752)
      PathPoint P5: humerus (0.01338412 -0.0410692 -0.004831674)
      PathPoint P6: humerus (0.01245669 -0.08379923 -0.002566819)
      PathPoint P7: humerus (0.01836674 -0.1307673 0.0002588402)
      PathPoint P8: humerus (0.02458993 -0.1891672 -0.006794545)
      PathPoint P9: humerus (0.02337165 -0.2916368 -0.01117766)
      PathPoint P10: radius (-0.002396239 -0.04492962 -0.002396239)
    Thelen2003Muscle bic_s: max_isometric_force=435.56 optimal_fiber_length=0.1825334 tendon_slack_length=0.1977141
        pennation_angle_at_optimal=0
      PathPoint P1: scapula (0.01710701 -0.05303438 -0.03541478)
      PathPoint P2: humerus (0.01204673 -0.08170703 -0.01187421)
      PathPoint P3: humerus (0.01836674 -0.1307673 -0.01163697)
      PathPoint P4: humerus (0.02458993 -0.1891672 -0.006794545)
      PathPoint P5: humerus (0.01829073 -0.2896043 -0.006096924)
      PathPoint P6: radius (-0.002396239 -0.04492962 -0.002396239)
    Thelen2003Muscle TRP1: max_isometric_force=280.5671 optimal_fiber_length=0.2016604 tendon_slack_length=0.003497001
        pennation_angle_at_optimal=0
      PathPoint P1: thorax (-0.09162626 0.04275892 0.006108417)
      PathPoint P2: thorax (-0.1331635 0.03420714 0.04031555)
      PathPoint P3: scapula (-0.04523523 0.001190401 -0.01309441)
    Thelen2003Muscle TRP2: max_isometric_force=168 optimal_fiber_length=0.1845903 tendon_slack_length=0.02857034
        pennation_angle_at_optimal=0
      PathPoint P1: thorax (-0.1062865 0.01343852 0.0073301)
      PathPoint P2: thorax (-0.1575972 0.01221683 0.08551784)
      PathPoint P3: scapula (-0.07261444 0.001190401 -0.02499842)
    Thelen2003Muscle TRP3: max_isometric_force=155.2832 optimal_fiber_length=0.09186735 tendon_slack_length=0.05252928
        pennation_angle_at_optimal=0
      PathPoint P1: clavicle (-0.03042014 0.03042014 0.1250606)
      PathPoint P2: thorax (-0.05375407 0.1478237 0.02321198)
    Thelen2003Muscle TRP4: max_isometric_force=557.2435 optimal_fiber_length=0.1129733 tendon_slack_length=0.04637851
        pennation_angle_at_optimal=0
      PathPoint P1: clavicle (-0.06196695 0.08900708 0.00563336)
      PathPoint P2: thorax (-0.02687704 0.03054209 0.1551538)
    ObjectGroup bras: members=(bic_l bic_s tric_long tric_lat tric_med)
    ObjectGroup Scapulothoracic: members=(TRP1 TRP2 TRP3 TRP4)
    ObjectGroup Glenohumeral: members=(DELT1 DELT2 DELT3 INFSP PECM1 PECM2 PECM3 SUBSC SUPSP)
  MarkerSet:
    Marker XIPH: thorax (0.101895 -0.2819963 -0.01006159)
    Marker STER: thorax (0.03767317 -0.03080768 -0.005438238)
    Marker CLAV_SC: clavicle (0.02024742 0.01172865 0.01107676)
    Marker CLAV_AC: clavicle (-0.0261878 0.03325406 0.149675)
    Marker SCAP_CP: scapula (0.04422895 0.01006194 -0.03154374)
    Marker SCAP_AA: scapula (-0.0638775 0.006631151 0.005062643)
    Marker SCAP_TS: scapula (-0.124873 -0.01142832 -0.1232446)
    Marker SCAP_IA: scapula (-0.157065 -0.1556485 -0.1049164)
    Marker DELT: humerus (-0.01343407 -0.1131253 0.02792776)
    Marker ARMl: humerus (-0.01291917 -0.1726301 0.01824822)
    Marker EPICl: humerus (-0.002382808 -0.3055171 0.03096989)
    Marker EPICm: humerus (-0.004208532 -0.3053377 -0.05742668)
    Marker LARM_ant: ulna (0.001872655 -0.1145728 0.04354672)
    Marker LARM_post: ulna (-0.005062905 -0.07385635 0.02375246)
    Marker LARM_elb: ulna (-0.03630782 -0.00504671 0.00577851)
    Marker LARM_dist: ulna (0.03720436 -0.1113934 0.0176794)
    Marker STYLulna: ulna (-0.01421445 -0.2414306 0.03185358)
    Marker STYLrad: radius (0.06409301 -0.2592732 0.03273506)
