# OpenSim document version 40000
ScaleTool colombe_real_data:
  mass: 51.27033 [kg]
  height: -1
  age: -1
  GenericModelMaker:
    model_file: model_ik.osim
    marker_set_file: marker_scaling.trc
  ModelScaler:
    apply: true
    scaling_order: measurements manualScale
    marker_file: marker_scaling.trc
    time_range: 0 0.24
    preserve_mass_distribution: true
    output_model_file: colombe_real_scaled.osim
    output_scale_file: scaled_file.xml
    MeasurementSet:
      Measurement thor: apply=false
        MarkerPair: markers=(XIPH STER)
      Measurement clav: apply=true
        MarkerPair: markers=(CLAV_SC SCAP_CP)
        BodyScale clavicle: axes=(X Y Z)
      Measurement scapx: apply=true
        MarkerPair: markers=(CLAV_AC SCAP_TS)
        BodyScale scapula: axes=(X Y Z)
      Measurement scapy: apply=false
      Measurement hum: apply=true
        MarkerPair: markers=(SCAP_AA EPICl)
        BodyScale humerus: axes=(X Y Z)
      Measurement scapz: apply=false
        MarkerPair: markers=(SCAP_AA SCAP_TS)
      Measurement rad: apply=true
        MarkerPair: markers=(EPICm STYLrad)
        BodyScale radius: axes=(X Y Z)
      Measurement ulna: apply=true
        MarkerPair: markers=(EPICl STYLulna)
        BodyScale ulna: axes=(X Y Z)
      Measurement hand: apply=false
      Measurement thory: apply=true
        MarkerPair: markers=(STER CLAV_AC)
        BodyScale thorax: axes=(X Y Z)
    ScaleSet:
      Scale: scales=(1.2 1.2 1.2) segment=thorax apply=False
      Scale: scales=(1 1 1) segment=humerus apply=False
      Scale: scales=(1 1 1) segment=ulna apply=False
      Scale: scales=(1 1 1) segment=radius apply=False
      Scale: scales=(1 1 1) segment=hand_r apply=true
  MarkerPlacer:
    apply: false
    marker_file: marker_scaling.trc
    time_range: 0 0.24
    output_model_file: C:\Users\amedeo\Documents\OpenSim\new_scal\colombe_real_data_scaled_marker.osim
    output_marker_file: C:\Users\amedeo\Documents\OpenSim\new_scal\marker.xml
    max_marker_movement: -1
    IKTaskSet:
      IKMarkerTask XIPH: apply=true weight=100
      IKMarkerTask STER: apply=true weight=100
      IKMarkerTask CLAV_SC: apply=true weight=100
      IKMarkerTask CLAV_AC: apply=true weight=100
      IKMarkerTask SCAP_CP: apply=true weight=1
      IKMarkerTask SCAP_AA: apply=true weight=100
      IKMarkerTask SCAP_TS: apply=true weight=100
      IKMarkerTask SCAP_IA: apply=true weight=1
      IKMarkerTask DELT: apply=true weight=1
      IKMarkerTask ARMl: apply=true weight=1
      IKMarkerTask EPICl: apply=true weight=100
      IKMarkerTask EPICm: apply=true weight=100
      IKMarkerTask LARM_ant: apply=true weight=1
      IKMarkerTask LARM_post: apply=true weight=1
      IKMarkerTask LARM_elb: apply=true weight=100
      IKMarkerTask LARM_dist: apply=true weight=1
      IKMarkerTask STYLulna: apply=true weight=100
      IKMarkerTask STYLrad: apply=true weight=100
