# OpenSim document version 30000
ForceSet arm26:
  PointActuator Tx: body=thorax point=(0 0 0) point_is_global=false direction=(1 0 0) force_is_global=true
      optimal_force=1000
  PointActuator Ty: body=thorax point=(0 0 0) point_is_global=false direction=(0 1 0) force_is_global=true
      optimal_force=1000
  PointActuator Tz: body=thorax point=(0 0 0) point_is_global=false direction=(0 0 1) force_is_global=true
      optimal_force=1000
  TorqueActuator [values shared by the 8 below unless stated]: torque_is_global=true optimal_force=1000
  TorqueActuator Rx: bodyA=thorax bodyB=ground axis=(1 0 0)
  TorqueActuator Ry: bodyA=thorax bodyB=ground axis=(0 1 0)
  TorqueActuator Rz: bodyA=thorax bodyB=ground axis=(0 0 1)
  TorqueActuator Rx_clav: bodyA=clavicle bodyB=thorax axis=(1 0 0) optimal_force=2000
  TorqueActuator Rx_hum: bodyA=humerus bodyB=scapula axis=(1 0 0)
  TorqueActuator Ry_hum: bodyA=humerus bodyB=scapula axis=(0 1 0)
  TorqueActuator Rz_hum: bodyA=humerus bodyB=scapula axis=(0 0 1)
  TorqueActuator Rz_ulna: bodyA=ulna bodyB=humerus axis=(1 0 0)
