# OpenSim document version 30000
ForceSet arm26:
  PointActuator Tx: body=r_humerus point=(0 0 0) point_is_global=false direction=(1 0 0) force_is_global=true
      optimal_force=1
  PointActuator Ty: body=r_humerus point=(0 0 0) point_is_global=false direction=(0 1 0) force_is_global=true
      optimal_force=1
  PointActuator Tz: body=r_humerus point=(0 0 0) point_is_global=false direction=(0 0 1) force_is_global=true
      optimal_force=1
  TorqueActuator Rx: bodyA=r_humerus bodyB=ground torque_is_global=true axis=(1 0 0) optimal_force=1
  TorqueActuator Ry: bodyA=r_humerus bodyB=ground torque_is_global=true axis=(0 1 0) optimal_force=1
  TorqueActuator Rz: bodyA=r_humerus bodyB=ground torque_is_global=true axis=(0 0 1) optimal_force=1
