# OpenSim document version 40000
InverseKinematicsTool:
  model_file: colombe_real_scaled.osim
  constraint_weight: 20
  accuracy: 1e-5
  marker_file: marker_scaling.trc
  time_range: 0 0.24
  report_errors: true
  output_motion_file: inverse_kin.mot
  report_marker_locations: true
  IKTaskSet:
    IKMarkerTask XIPH: apply=true weight=100
    IKMarkerTask STER: apply=true weight=100
    IKMarkerTask CLAV_SC: apply=true weight=100
    IKMarkerTask CLAV_AC: apply=true weight=100
    IKMarkerTask SCAP_CP: apply=true weight=1
    IKMarkerTask SCAP_AA: apply=true weight=100
    IKMarkerTask SCAP_TS: apply=true weight=100
    IKMarkerTask SCAP_IA: apply=true weight=1
    IKMarkerTask DELT: apply=true weight=1
    IKMarkerTask ARMl: apply=true weight=1
    IKMarkerTask EPICl: apply=true weight=100
    IKMarkerTask EPICm: apply=true weight=100
    IKMarkerTask LARM_ant: apply=true weight=1
    IKMarkerTask LARM_post: apply=true weight=1
    IKMarkerTask LARM_elb: apply=true weight=100
    IKMarkerTask LARM_dist: apply=true weight=1
    IKMarkerTask STYLulna: apply=true weight=100
    IKMarkerTask STYLrad: apply=true weight=100
