# OpenSim document version 30000
AnalyzeTool arm3muscles:
  model_file: /home/amedeo/Documents/programmation/ElbowModelCeinms/Arm26/Opensim/arm26.osim
  replace_force_set: false
  force_set_files: /home/amedeo/Documents/programmation/ElbowModelCeinms/Arm26/Opensim/arm26_Reserve_Actuators_.xml
  results_directory: /home/amedeo/Documents/programmation/ElbowModelCeinms/Arm26/Opensim/Results
  output_precision: 8
  initial_time: 0
  final_time: 1
  solve_for_equilibrium_for_auxiliary_states: true
  maximum_number_of_integrator_steps: 20000
  maximum_integrator_step_size: 1
  minimum_integrator_step_size: 1e-8
  integrator_error_tolerance: 1e-5
  coordinates_file: /home/amedeo/Documents/programmation/ElbowModelCeinms/Arm26/Opensim/arm26_InverseKinematics.mot
  lowpass_cutoff_frequency_for_coordinates: 6
  AnalysisSet Analyses:
    StaticOptimization: start_time=0 end_time=1 step_interval=1 in_degrees=true use_model_force_set=true
        activation_exponent=2 use_muscle_physiology=true optimizer_convergence_criterion=0.0001
        optimizer_max_iterations=100
